// SBML level 3 version 2

model Vilar_Oscillator()

  // Compartments:
  compartment vol = 1;

  // Species:
  species Da in vol = 1/vol;  // substance in mole
  species Da_prime in vol = 0;  // substance in mole
  species Ma in vol = 0;  // substance in mole
  species Dr in vol = 1/vol;  // substance in mole
  species Dr_prime in vol = 0;  // substance in mole
  species Mr in vol = 0;  // substance in mole
  species C in vol = 0;  // substance in mole
  species A in vol = 0;  // substance in mole
  species R in vol = 0;  // substance in mole

  // Parameters:
  alphaA = 50;
  alphaA_prime = 500;
  alphaR = 0.01;
  alphaR_prime = 50;
  betaA = 50;
  betaR = 5;
  deltaMA = 10;
  deltaMR = 0.5;
  deltaA = 1;
  deltaR = 0.2;
  gammaA = 1;
  gammaR = 1;
  gammaC = 2;
  thetaA = 50;
  thetaR = 100;

  // Reactions:
  r1: A + R -> C; gammaC*A*R/vol;
  r2: A -> ; deltaA*A;
  r3: C -> R; deltaA*C;
  r4: R -> ; deltaR*R;
  r5: A + Da -> Da_prime; gammaA*A*Da/vol;
  r6: Da_prime -> A + Da; thetaA*Da_prime;
  r7: Da -> Da + Ma; alphaA*Da;
  r8: Da_prime -> Da_prime + Ma; alphaA_prime*Da_prime;
  r9: Ma -> ; deltaMA*Ma;
  r10: Ma -> A + Ma; betaA*Ma;
  r11: A + Dr -> Dr_prime; gammaR*A*Dr/vol;
  r12: Dr_prime -> A + Dr; thetaR*Dr_prime;
  r13: Dr -> Dr + Mr; alphaR*Dr;
  r14: Dr_prime -> Dr_prime + Mr; alphaR_prime*Dr_prime;
  r15: Mr -> ; deltaMR*Mr;
  r16: Mr -> Mr + R; betaR*Mr;
end
